// SBML level 3 version 1

function KL_10020(Kma, B, A, Kmb)
  NaN;
end

model SABIOmdl18Sep2018244()
  // This model has been created with the help of the SABIO-RK Database (http://sabio.h-its.org/) (c) 2005-2018 HITS gGmbH http://www.h-its.org
  // To cite SABIO-RK Database, please use "http://www.ncbi.nlm.nih.gov/pubmed/22102587"
  // SABIO-RK - database for biochemical reaction kinetics. Wittig U, Kania R, Golebiewski M, Rey M, Shi L, Jong L, Algaa E, Weidemann A, Sauer-Danzwith H, Mir S, Krebs O, Bittkowski M, Wetsch E, Rojas I, Mueller W. Nucleic Acids Res. 2012;40(Database issue)790-6

  // Compartments:
  compartment compart_Cell;

  // Species:
  species SPC_1406_Cell in compart_Cell = 1; SPC_1406_Cell is "Glucose";  // CHEBI:17234 kegg.compound:C00031 kegg.compound:C00293
  species SPC_34_Cell in compart_Cell = 1; SPC_34_Cell is "ATP";  // CHEBI:15422 CHEBI:30616 kegg.compound:C00002
  species SPC_1404_Cell in compart_Cell = 1; SPC_1404_Cell is "Glucose 6-phosphate";  // CHEBI:4170 kegg.compound:C00092
  species SPC_35_Cell in compart_Cell = 1; SPC_35_Cell is "ADP";  // CHEBI:16761 kegg.compound:C00008
  species ENZ_143987_Cell in compart_Cell = 1; ENZ_143987_Cell is "hexokinase(Enzyme) wildtype";  // uniprot:Q6SYC5

  // Reactions:
  REAC_0: SPC_1406_Cell + SPC_34_Cell -> SPC_1404_Cell + SPC_35_Cell; KL_10020(Kma_SPC_34_Cell, SPC_1406_Cell, SPC_34_Cell, Kmb_SPC_1406_Cell);  // modifiers: ENZ_143987_Cell; isVersionOf ec-code:2.7.1.1; kegg.reaction:R00299; hasTaxon taxonomy:6253; sabiork.reaction:6915
    Kma_SPC_34_Cell = 0.22 mM; Kmb_SPC_1406_Cell = 4.7 mM;

  // Unit definitions:
  unit mM = 1e-3 mole / litre;
end
