// SBML level 3 version 2

model main()
  // model units - time: second, extent: mmole

  // Compartments:
  compartment Cell = 1 litre;

  // Species:
  substanceOnly species benzaldehyde_lyase in Cell = 1*Cell; benzaldehyde_lyase is "benzaldehyde-lyase";  // substance in mmole; isVersionOf uniprot:P51853
  substanceOnly species CAS_93_02_7 in Cell = 4*Cell; CAS_93_02_7 is "dimethoxy-benzaldehyde";  // substance in mmole
  substanceOnly species CHEBI_17169 in Cell = 0; CHEBI_17169 is "benzaldehyde";  // substance in mmole; CHEBI:17169

  // Reactions:
  Michaelis_Menten_Kinetic: CAS_93_02_7 => CHEBI_17169; kcat*E*A/(KMA + A);  // modifiers: benzaldehyde_lyase
    KMA = 100 mmole; kcat = 100 s_1; E = 100 mmole; A = 100 mmole;

  // Unit definitions:
  unit mmole = 1e-3 mole;
  unit s_1 = 1 / second;
  unit K = kelvin;
end
